// COMSOL Multiphysics 5.6.0.401 model "roebel.mph"
// Outline of the model tree

Parameters
  slot_width = 22[mm]
  slot_height = 152[mm]
  strand_insulation_thickness = 0.21[mm]
  strand_width = 7.69[mm]+strand_insulation_thickness
  Nstrand_horizantel = 2
  Nstrand_vertical = 46
  strand_height_3 = (2.46[mm]+strand_insulation_thickness/2)*24/(Nstrand_vertical+1)
  strand_height_2 = 2.46[mm]+strand_insulation_thickness/2
  strand_height = strand_height_3
  wedge_height = 4[mm]
  spacer_height = 7.5[mm]
  main_insulation = 3[mm]  // groundwall insulation
  tooth_width = 55[mm]
  yoke_thickness = 20[mm]
  airgap = 18[mm]
  magnet_height = 20[mm]
  Iphase = 1860*sqrt(2)
  phi = 0
  coil_thickness = 1[mm]
  If = 0[A]

Variables
  var1 "Variables 1"

Geometry
  geom1 "Geometry 1" (2D, length unit m)
    r1: Rectangle | size = {slot_width, slot_height}
    r2: Rectangle | size = {slot_width, wedge_height}
    dif1: Difference | input = r1; input2 = r2; keep = on
    del1: Delete "Delete Entities 1" | input = r1(1) domains 1
    r3: Rectangle | pos = {main_insulation, wedge_height+main_insulation}; size = {strand_width, strand_height}
    arr1: Array
      input = r3
      size = {Nstrand_horizantel, Nstrand_vertical}
      fullsize = {Nstrand_horizantel, Nstrand_vertical}
      displ = {strand_width, strand_height}
    mov1: Move | input = arr1; displx = 0; disply = main_insulation*2+spacer_height+((Nstrand_vertical+1)*strand_height)
    r8: Rectangle | pos = {main_insulation, wedge_height+main_insulation}; size = {strand_width, strand_height}
    arr2: Array
      input = r8
      size = {Nstrand_horizantel, Nstrand_vertical}
      fullsize = {Nstrand_horizantel, Nstrand_vertical}
      displ = {strand_width, strand_height}
    r4: Rectangle
      pos = {0, main_insulation*2+(Nstrand_vertical+1)*strand_height+wedge_height}
      size = {slot_width, spacer_height}
    r5: Rectangle | pos = {-tooth_width/2, 0}; size = {slot_width+tooth_width, slot_height+yoke_thickness}
    dif2: Difference | input = r5; input2 = dif1; keep = on
    del2: Delete "Delete Entities 2" | input = r5(1) domains 1
    dif3: Difference | input = dif1; input2 = selection arr2; keep = on
    dif6: Difference | input = dif1; input2 = selection mov1; keep = on
    del3: Delete "Delete Entities 3" | input = dif1(1) domains 1
    dif4: Difference | input = dif2; input2 = r2; keep = on
    del4: Delete "Delete Entities 4" | input = dif2(1) domains 1
    dif5: Difference | input = dif3; input2 = r4; keep = on
    del5: Delete "Delete Entities 5" | input = dif3(1) domains 1
    r6: Rectangle | pos = {-tooth_width/2, -airgap-magnet_height}; size = {slot_width+tooth_width, magnet_height}
    r7: Rectangle | pos = {-tooth_width/2, -airgap}; size = {slot_width+tooth_width, airgap}
    r9: Rectangle (disabled) | size = {1, magnet_height}
    r10: Rectangle | pos = {-0.15-(slot_width-tooth_width)/2, slot_height+yoke_thickness}; size = {0.3, yoke_thickness}
    dif7: Difference (disabled) | input = dif4; input2 = r10
    r11: Rectangle | pos = {-tooth_width/2, slot_height}; size = {slot_width+tooth_width, yoke_thickness}
    r12: Rectangle | pos = {-0.15-(slot_width-tooth_width)/2, -0.038-0.05}; size = {0.3, 0.05}
    r14: Rectangle
      pos = {-0.15-(slot_width-tooth_width)/2, -0.038-0.05+0.05}
      size = {0.05, slot_height+airgap+magnet_height+yoke_thickness}
    mov2: Move | input = r14; keep = on; displx = 0.3-0.05; disply = 0
    r15: Rectangle | pos = {-tooth_width/2-0.01, -airgap-magnet_height+0.0025}; size = {0.01, magnet_height-0.005}
    mov3: Move | input = r15; keep = on; displx = slot_width+tooth_width+0.01; disply = 0
    r16: Rectangle
      pos = {-0.15-(slot_width-tooth_width)/2+0.05, -0.038-0.05+0.05}
      size = {0.056, slot_height+airgap+magnet_height+yoke_thickness}
    r17: Rectangle | pos = {0.0495, -0.038}; size = {0.067, magnet_height+airgap+slot_height+yoke_thickness}
    fin: Finalize "Form Union"

Materials
  mat1: Common "Air" on domains 4, 7, 10-13, 19-59, 65-105, 111-151, 157-197, 199
    def "Basic"
      relpermeability = 1
      electricconductivity = 1
      relpermittivity = 1
  mat2: Common "Copper" on selection geom1_mov1_dom
    def "Basic"
      relpermeability = 1
      electricconductivity = 5.998e7[S/m]
      heatcapacity = 385[J/(kg*K)]
      relpermittivity = 1
      emissivity = 0.5
      density = 8940[kg/m^3]
      thermalconductivity = 400[W/(m*K)]
    Enu "Young's modulus and Poisson's ratio"
      youngsmodulus = 126e9[Pa]
      poissonsratio = 0.34
    linzRes "Linearized resistivity"
      rho0 = 1.667e-8[ohm*m]
      alpha = 3.862e-3[1/K]
      Tref = 293.15[K]
  mat3: Common "N54 (Sintered NdFeB)" on domains 6
    def "Basic"
      electricconductivity = 1/1.4[uohm*m]
      relpermittivity = 1
    RemanentFluxDensity
      murec = 1.05
      normBr = 1.47[T]
  mat4: Common "Material 4" on domains 1-3, 6, 8, 9, 198, 201
    def "Basic"
      relpermeability = 6e3
      electricconductivity = 1
      relpermittivity = 1
  mat5: Common "Copper 1" on selection geom1_arr2_dom
    // same settings as mat2
  mat6: Common "Material 6" on domains 5, 200
    def "Basic"
      relpermeability = 1
      relpermittivity = 1

Physics
  mf: InductionCurrents "Magnetic Fields" on all domains
    dependent variable A = {Ax, Ay, Az}
    ShapeProperty.order_magneticvectorpotential = 1
    components.components = threecomponent
    al1: AmperesLaw "Ampère's Law 1" (default)
    mi1: MagneticInsulation (default)
    init1: init "Initial Values 1" (default)
    coil1: Coil on selection geom1_mov1_dom
      ConductorModel = Single
      coilGroup = 0
      ICoil = Iphase*sin(2*pi*50*t)[A]
      N = 1
      loss1: LossCalculation on all domains
    coil2: Coil on selection geom1_arr2_dom | ConductorModel = Single; ICoil = Iphase*sin(2*pi*50*t+phi)[A]; N = 1
      loss1: LossCalculation on all domains
    pmc1: PerfectMagneticConductor (disabled) on no boundaries
    coil3: Coil on domains 5, 200 | ConductorModel = Multi; coilGroup = 1; ICoil = If[A]; N = 72
      rcd1: ReverseCoilGroupDomain "Reversed Current Direction 1" on domains 200

Mesh
  mesh1 "Mesh 1"
    size: MeshSizeDefault | hauto = 1
    ftri1: FreeTri "Free Triangular 1" on remaining entities

Studies
  std1 "Study 1"
    ccc: CoilCurrentCalculation "Coil Geometry Analysis" (disabled)
    time: Transient "Time Dependent" | tunit = ms; tlist = range(0,0.1,60)

Solver configurations
  sol1 "Solution 1" (study std1)
    v1: Variables "Dependent Variables 1"
    t1: Time "Time-Dependent Solver 1"
      tlist = range(0,0.1,60)
      tout = tstepsclosest
      tstepsbdf = strict
      estrat = exclude
      dDef: Direct
      fc1: FullyCoupled | linsolver = dDef

Datasets
  dset1: Solution | solution = sol1

Derived values
  gev1: EvalGlobal "Global Evaluation 1"
    data = dset1
    table = tbl1
    expr = {mf.VCoil_1, mf.VCoil_2}
    descr = {Coil voltage, Coil voltage}
  int1: IntVolume "Volume Integration 1" | table = tbl2; expr = comp1.mf.intWm; descr = Total magnetic energy
  int2: IntSurface "Surface Integration 2" on selection geom1_arr2_dom | data = dset1; table = tbl4; expr = mf.Jz
  int3: IntSurface "Surface Integration 3" on selection geom1_arr2_dom
    data = dset1
    table = tbl3
    expr = {, mf.Qh}
    descr = {, "Volumetric loss density, electromagnetic"}
  gev2: EvalGlobal "Global Evaluation 2" | data = dset1

Tables
  tbl3: Table
    // Surface Integration 3
    Time (ms) | Volumetric loss density, electromagnetic (W/m) | Volumetric loss density, electromagnetic (W/m)
    0 | 0 | 0
    0.1 | 2.70444 | 14.236
    0.2 | 7.56769 | 39.9342
    0.3 | 1966.25 | 1989.61
    0.4 | 5327.93 | 5355.37
    0.5 | 544.278 | 673.441
    0.6 | 658.265 | 827.939
    0.7 | 1037.54 | 1250.31
    0.8 | 1395.29 | 1654.02
    0.9 | 1809.98 | 2116.86
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  tbl4: Table
    // Surface Integration 2
    Time (ms) | Current density, z component (A) | Current density, z component (A)
    0 | 0 | 0
    0.1 | 82.8431 | 82.8231
    0.2 | 165.167 | 165.167
    0.3 | 12789.4 | 12687.5
    0.4 | 18502.9 | 18387.7
    0.5 | -5783.61 | -5782.16
    0.6 | -6319.3 | -6315.99
    0.7 | -7992.65 | -7983.87
    0.8 | -9287.5 | -9274.9
    0.9 | -10596.8 | -10580.3
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
Plots
  pg1: PlotGroup2D "Magnetic Flux Density Norm (mf)" | data = dset1
    surf1: Surface | expr = mf.normB
    str1: Streamline on boundaries 11, 15, 18, 19, 21, 25-43, 45, 47, 49, 51, 53, 55, 57, 59, 61, 63, 65, 67, 69, 71, 73, 75, 77, 79, 81, 83, 85, 87, 89, 91, 93, 95, 97, 99, 101, 103, 105, 107, 109, 111, 113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
      expr = {mf.Bx, mf.By}
      udist = 0.03
      pointtype = arrow
      arrowlength = logarithmic
      col1: Color "Color Expression 1" | expr = log10(mf.normB)
      filt1: Filter | expr = !isScalingSystemDomain
    con1: Contour | expr = mf.Az; levelrounding = off
      filt1: Filter | expr = !isScalingSystemDomain
  pg2: PlotGroup2D "2D Plot Group 2" | data = dset1
    surf1: Surface | expr = mf.normB
      sel1: Selection on selection geom1_mov1_dom
    arws1: ArrowSurface | expr = {mf.Bx, mf.By}
      sel1: Selection on domains 10-197
  pg3: PlotGroup1D "1D Plot Group 3" | data = none
    tblp1: Table "Table Graph 1" | table = tbl1
  pg4: PlotGroup2D "2D Plot Group 4" | data = none
  pg5: PlotGroup2D "2D Plot Group 5" | data = dset1
    surf1: Surface | expr = mf.normJ
      sel1: Selection on selection geom1_arr2_dom
    arws1: ArrowSurface | expr = {mf.Bx, mf.By}
      sel1: Selection on domains 10-197
  pg6: PlotGroup1D "1D Plot Group 6" | data = none
    tblp1: Table "Table Graph 1" | table = tbl3
  pg7: PlotGroup1D "1D Plot Group 7" | data = none
    tblp1: Table "Table Graph 1" | table = tbl4
  pg8: PlotGroup2D "2D Plot Group 8" | data = dset1
    surf1: Surface | expr = mf.Jz
      sel1: Selection on selection geom1_arr2_dom
    arws1: ArrowSurface | expr = {mf.Bx, mf.By}
      sel1: Selection on domains 10-197
  pg9: PlotGroup2D "2D Plot Group 9" | data = dset1
    surf1: Surface | expr = mf.Jz
      sel1: Selection on domains 14-197
    arws1: ArrowSurface | expr = {mf.Bx, mf.By}
      sel1: Selection on domains 10-197
  pg10: PlotGroup2D "2D Plot Group 10" | data = dset1
    surf1: Surface | expr = mf.Jz
      sel1: Selection on domains 14-197
    arws1: ArrowSurface | expr = {mf.Bx, mf.By}
      sel1: Selection on domains 10-197